<?xml version="1.0"?>

<!-- APC 20x10 propeller — Ct/Cp from PER3_20x10.dat (8000 RPM block)
     First column = J (advance ratio), second = coefficient value. -->

<propeller name="20x10">
  <ixx> 0.00085 </ixx>
  <diameter unit="IN"> 20.0 </diameter>
  <numblades> 2 </numblades>
  <minpitch> 30 </minpitch>   <!-- fixed-pitch; these angles are placeholders -->
  <maxpitch> 30 </maxpitch>

  <!-- Thrust coefficient Ct(J) at 8000 RPM -->
  <table name="C_THRUST" type="internal">
    <tableData>
      0.0000  0.0821
      0.0238  0.0810
      0.0477  0.0798
      0.0715  0.0785
      0.0953  0.0771
      0.1192  0.0755
      0.1430  0.0737
      0.1668  0.0718
      0.1907  0.0697
      0.2145  0.0674
      0.2384  0.0650
      0.2622  0.0624
      0.2860  0.0596
      0.3099  0.0568
      0.3337  0.0538
      0.3575  0.0507
      0.3814  0.0475
      0.4052  0.0442
      0.4290  0.0408
      0.4529  0.0373
      0.4767  0.0337
      0.5005  0.0301
      0.5244  0.0264
      0.5482  0.0227
      0.5721  0.0189
      0.5959  0.0151
      0.6197  0.0113
      0.6436  0.0075
      0.6674  0.0037
    </tableData>
  </table>

  <!-- Power coefficient Cp(J) at 8000 RPM -->
  <table name="C_POWER" type="internal">
    <tableData>
      0.0000  0.0248
      0.0238  0.0253
      0.0477  0.0259
      0.0715  0.0264
      0.0953  0.0268
      0.1192  0.0272
      0.1430  0.0276
      0.1668  0.0278
      0.1907  0.0280
      0.2145  0.0280
      0.2384  0.0280
      0.2622  0.0278
      0.2860  0.0275
      0.3099  0.0271
      0.3337  0.0266
      0.3575  0.0260
      0.3814  0.0252
      0.4052  0.0243
      0.4290  0.0233
      0.4529  0.0221
      0.4767  0.0208
      0.5005  0.0194
      0.5244  0.0178
      0.5482  0.0161
      0.5721  0.0142
      0.5959  0.0122
      0.6197  0.0101
      0.6436  0.0079
      0.6674  0.0055
    </tableData>
  </table>

</propeller>
